#include "config.glm"
#include "output.glm"

clock {
	timezone ${TIMEZONE};
	starttime ${STARTTIME};
	stoptime ${STOPTIME};
}

module residential;

object house {
	name "house_1";
    air_temperature "72 degF";
	heating_setpoint "68 degF";
	cooling_setpoint "72 degF";
}

#on_exit 0 python3 plotcsv.py;
